*Heading
 PECVD barrier permeation analysis - Job_SS_c100_d10000_o0p25
** Job name: Job_SS_c100_d10000_o0p25 Model name: PermeationModel
** Generated by: Abaqus/CAE 2024
*Preprint, echo=NO, model=NO, history=NO, contact=NO
**
** PARTS
**
*Part, name=UnitCell
*Node
      1,        2600.,         700.
      2,        2600.,         650.
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*Element, type=DC2D4
  1,   1,   2,  21, 314
  2, 314,  21,  22, 313
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*Nset, nset=_G10, internal
   1,   2,   3,   4,  21,  22
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*Elset, elset=_G10, internal, generate
   1,  148,    1
*Nset, nset=_G11, internal
   1,   2,   5,   6, 315, 316
*Elset, elset=_G11, internal
 149, 150
*Nset, nset=_G12, internal
   7,   8,   9,  10, 317, 318
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*Elset, elset=_G12, internal, generate
 151,  348,    1
*Nset, nset=_G13, internal
   5,   6,  11,  12, 711, 712
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*Elset, elset=_G13, internal, generate
 349,  398,    1
*Nset, nset=_G14, internal
   2,   3,   6,   7,  10,  12
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*Elset, elset=_G14, internal, generate
 399,  598,    1
*Nset, nset=_G15, internal
   7,   8,  13,  14, 809, 810
*Elset, elset=_G15, internal
 599, 600
*Nset, nset=_G16, internal
    8,    9,   14,   15,   16,  317
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*Elset, elset=_G16, internal, generate
 601,  800,    1
*Nset, nset=_G17, internal
   15,   16,   17,   18,  811,  812
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*Elset, elset=_G17, internal, generate
  801,  2800,     1
*Nset, nset=_G18, internal
    1,    4,    5,   11,   19,   20
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*Elset, elset=_G18, internal, generate
 2801,  3000,     1
** Section: barrier_section
*Solid Section, elset=_G10, material=barrier
,
** Section: air_crack_section
*Solid Section, elset=_G11, material=air_crack
,
** Section: barrier_section
*Solid Section, elset=_G12, material=barrier
,
** Section: barrier_section
*Solid Section, elset=_G13, material=barrier
,
** Section: interlayer_section
*Solid Section, elset=_G14, material=interlayer
,
** Section: air_crack_section
*Solid Section, elset=_G15, material=air_crack
,
** Section: interlayer_section
*Solid Section, elset=_G16, material=interlayer
,
** Section: PET_section
*Solid Section, elset=_G17, material=PET
,
** Section: interlayer_section
*Solid Section, elset=_G18, material=interlayer
,
*End Part
**
**
** ASSEMBLY
**
*Assembly, name=Assembly
**
*Instance, name=UnitCell-1, part=UnitCell
*End Instance
**
*Nset, nset=BottomNodes, instance=UnitCell-1
   17,   18, 1019, 1020, 1021, 1022
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*Nset, nset=TopNodes, instance=UnitCell-1
   19,   20, 1227, 1228, 1229, 1230
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*Elset, elset=_Bottom-Surface_S3, internal, instance=UnitCell-1, generate
 2601,  2800,     1
*Surface, type=ELEMENT, name=Bottom-Surface
_Bottom-Surface_S3, S3
*Elset, elset=_Left-Surface_S2, internal, instance=UnitCell-1, generate
 1000,  2800,   200
*Surface, type=ELEMENT, name=Left-Surface
_Left-Surface_S2, S2
*Elset, elset=_Right-Surface_S4, internal, instance=UnitCell-1, generate
  801,  2601,   200
*Surface, type=ELEMENT, name=Right-Surface
_Right-Surface_S4, S4
*Elset, elset=_Top-Surface_S3, internal, instance=UnitCell-1, generate
 2801,  3000,     1
*Surface, type=ELEMENT, name=Top-Surface
_Top-Surface_S3, S3
*End Assembly
**
** MATERIALS
**
*Material, name=PET
*Diffusivity
 1e+06,
*Solubility
 1e-33,
*Material, name=air_crack
*Diffusivity
 2.4e+13,
*Solubility
 4e-29,
*Material, name=barrier
*Diffusivity
 0.01,
*Solubility
 1e-36,
*Material, name=interlayer
*Diffusivity
 5e+07,
*Solubility
 2e-33,
** ----------------------------------------------------------------
**
** STEP: Permeation
**
*Step, name=Permeation, nlgeom=NO
*Mass Diffusion, end=PERIOD, dcmax=1000.
1., 86400., 1e-06, 3600.,
**
** BOUNDARY CONDITIONS
**
** Name: Inlet Type: Normalized concentration
*Boundary
TopNodes, 11, 11, 1.
** Name: Outlet Type: Normalized concentration
*Boundary
BottomNodes, 11, 11
**
** OUTPUT REQUESTS
**
*Restart, write, frequency=0
**
** FIELD OUTPUT: F-Output-1
**
*Output, field
*Node Output
COORD, NNC
*Element Output, directions=YES
COORD, IVOL, MFL
*Output, history, frequency=0
*End Step
