*Heading
 PECVD barrier permeation analysis
** Job name: Job_SS_c1e02_d1e04_o0p25 Model name: PermeationModel
** Generated by: Abaqus/CAE 2024
*Preprint, echo=NO, model=NO, history=NO, contact=NO
**
** PARTS
**
*Part, name=UnitCell
*Node
      1,           0.,           0.
      2,          50.,           0.
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*Element, type=DC2D4
   1,    1,    2,  203,  202
   2,    2,    3,  204,  203
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*Nset, nset=_G2, internal, generate
    1,  3216,     1
*Elset, elset=_G2, internal, generate
    1,  3000,     1
** Section: PET_section
*Solid Section, elset=_G2, material=PET
,
*End Part
**
**
** ASSEMBLY
**
*Assembly, name=Assembly
**
*Instance, name=UnitCell-1, part=UnitCell
*End Instance
**
*Elset, elset=_Bottom-Surface_S1, internal, instance=UnitCell-1, generate
   1,  200,    1
*Surface, type=ELEMENT, name=Bottom-Surface
_Bottom-Surface_S1, S1
*Elset, elset=_Left-Surface_S4, internal, instance=UnitCell-1, generate
    1,  2801,   200
*Surface, type=ELEMENT, name=Left-Surface
_Left-Surface_S4, S4
*Elset, elset=_Right-Surface_S2, internal, instance=UnitCell-1, generate
  200,  3000,   200
*Surface, type=ELEMENT, name=Right-Surface
_Right-Surface_S2, S2
*Elset, elset=_Top-Surface_S3, internal, instance=UnitCell-1, generate
 2801,  3000,     1
*Surface, type=ELEMENT, name=Top-Surface
_Top-Surface_S3, S3
*End Assembly
**
** MATERIALS
**
*Material, name=PET
*Diffusivity
 1e+06,
*Solubility
 1e-33,
*Material, name=air_crack
*Diffusivity
 2.4e+13,
*Solubility
 4e-29,
*Material, name=barrier
*Diffusivity
 0.01,
*Solubility
 1e-36,
*Material, name=interlayer
*Diffusivity
 5e+07,
*Solubility
 2e-33,
** ----------------------------------------------------------------
**
** STEP: Permeation
**
*Step, name=Permeation, nlgeom=NO
*Mass Diffusion, end=PERIOD, dcmax=1000.
1., 86400., 1e-06, 3600.,
**
** OUTPUT REQUESTS
**
*Restart, write, frequency=0
**
** FIELD OUTPUT: F-Output-1
**
*Output, field, variable=PRESELECT
**
** HISTORY OUTPUT: H-Output-1
**
*Output, history, variable=PRESELECT
*End Step
